// COMSOL Multiphysics 5.2.1.152 model "brick_8FINALparam_Model.mph"
// Outline of the model tree

Parameters
  t = 4 [mm]  // outer width
  l = 1.33 [mm]  // bar length
  ax = 12.5 [mm]  // brick height
  ay = 12.5 [mm]  // brick width
  w = 1 [mm]  // bar width
  d = 3.1667 [mm]  // channel width
  Ox = -31.6  // originX (bottom left point)
  Oy = -5  // originY (bottom left point)

Coordinate systems
  pml1: PML "Perfectly Matched Layer 1" on domains 1-3, 6

Geometry
  geom1 "Geometry 1" (2D, length unit mm)
    r10: Rectangle "bar a" | pos = {(Ox+ax)-t-l, Oy}; size = {l, w}
    r11: Rectangle "bar b" | pos = {Ox+t, Oy+(w+d)}; size = {l, w}
    r19: Rectangle "bar c" | pos = {(Ox+ax)-t-l, Oy+((2*w)+(2*d))}; size = {l, w}
    r16: Rectangle "left_boundary" | pos = {Ox, Oy}; size = {t, ay}
    r14: Rectangle "top_boundary" | pos = {Ox, Oy+ay}; size = {ax, w}
    r15: Rectangle "right_boundary" | pos = {(Ox+ax)-t, Oy}; size = {t, ay}
    uni1: Union | input = r10, r11, r14, r15, r16, r19
    r17: Rectangle "air" | pos = {-33.600000882305, -26.849998616782}; size = {17.000003032146, 36.143958680246}
    r18: Rectangle "source" | pos = {-33.600002205372, -28.0}; size = {17.000004888122, 1.1500021979122}
    r22: Rectangle "left" | pos = {-42.166156768799, -28.000000867482}; size = {8.5661558864938, 35.999998465933}
    r23: Rectangle "right" | pos = {-16.599996144624, -28.000001191086}; size = {7.1535316060496, 35.999998789539}
    r24: Rectangle "bottom" | pos = {-42.166156940367, -35.513125429547}; size = {32.719692717863, 7.5}
    r25: Rectangle "top" | pos = {-42.166156940367, 8}; size = {32.71969132933, 7.4552136725431}
    dif1: Difference | input = r17; input2 = uni1
    sca1: Scale | input = dif1; type = anisotropic; factor = {1, 0.9641998076462}; pos = {-25.1, -26.85}
    fin: Finalize "Form Union"

Materials
  mat4: Common "Air" on domains 5
    def "Basic"
      relpermeability = 1
      relpermittivity = 1
      dynamicviscosity = eta(T[1/K])[Pa*s]
      ratioofspecificheat = 1.4
      electricconductivity = 0[S/m]
      heatcapacity = Cp(T[1/K])[J/(kg*K)]
      density = rho(pA[1/Pa],T[1/K])[kg/m^3]
      thermalconductivity = k(T[1/K])[W/(m*K)]
      soundspeed = cs(T[1/K])[m/s]
      eta: Piecewise | arg = T; pieces = {200.0, 1600.0, -8.38278E-7+8.35717342E-8*T^1-7.69429583E-11*T^2+4.6437266E-14*T^3-1.06585607E-17*T^4}
      Cp: Piecewise | arg = T; pieces = {200.0, 1600.0, 1047.63657-0.372589265*T^1+9.45304214E-4*T^2-6.02409443E-7*T^3+1.2858961E-10*T^4}
      rho: Analytic | expr = pA*0.02897/8.314/T; args = {pA, T}; dermethod = manual; argders = {{pA, d(pA*0.02897/8.314/T,pA)}, {T, d(pA*0.02897/8.314/T,T)}}
      k: Piecewise | arg = T; pieces = {200.0, 1600.0, -0.00227583562+1.15480022E-4*T^1-7.90252856E-8*T^2+4.11702505E-11*T^3-7.43864331E-15*T^4}
      cs: Analytic | expr = sqrt(1.4*287*T); args = T; dermethod = manual; argders = {T, d(sqrt(1.4*287*T),T)}
    RefractiveIndex
      n = 1
      ki = 0
  mat5: Common "Acrylic plastic" on domains 4
    def "Basic"
      thermalexpansioncoefficient = 7.0e-5[1/K]
      heatcapacity = 1470[J/(kg*K)]
      density = 1190[kg/m^3]
      thermalconductivity = 0.18[W/(m*K)]
    Enu "Young's modulus and Poisson's ratio"
      youngsmodulus = 3.2e9[Pa]
      poissonsratio = 0.35

Physics
  acpr: PressureAcoustics "Pressure Acoustics, Frequency Domain" on domains 5
    dependent variable p
    fpam1: FrequencyPressureAcousticsModel "Pressure Acoustics 1" (default)
    shb1: SoundHard "Sound Hard Boundary (Wall) 1" (default)
    init1: init "Initial Values 1" (default)
    mls1: FrequencyMonopoleLineSource "Monopole Point Source 1" on no points
    pwr1: PlaneWaveRadiation on boundaries 12
      ipf1: IncidentPressureField on all boundaries | pamp = 1; c = 365

Mesh
  mesh1 "Mesh 1"
    size: MeshSizeDefault | hauto = 2
    ftri1: FreeTri "Free Triangular 1" on domains 5

Studies
  std1 "Study 1"
    freq: Frequency "Frequency Domain" | punit = kHz; plist = 3.43

Solver configurations
  sol1 "Solution 1" (study std1)
    v1: Variables "Dependent Variables 1"
    s1: Stationary "Stationary Solver 1"
      dDef: Direct
      p1: Parametric | pname = freq; plistarr = 3.43; punit = kHz; pcontinuationmode = no
      fc1: FullyCoupled

Datasets
  dset1: Solution | solution = sol1

Plots
  pg1: PlotGroup2D "Acoustic Pressure (acpr)" | data = dset1
    surf1: Surface | expr = abs(acpr.p_t)
  pg2: PlotGroup2D "Sound Pressure Level (acpr)" | data = dset1
    surf1: Surface | expr = acpr.Lp; unit = dB

Exports
  anim1: Animation | target = player; sweeptype = dde; options = off; axes = on